# Brechnung der Leistung:
c_pH2O := 75.291 J/(mol*K)
V := 0.5 m^3/hr = 0.000138889 m^3/s
ΔT := (80 - 10) K = 70 K
ρ := 999 kg/m^3
M := 18*10^-3 kg/mol
m := ρ*V = 0.13875 kg/s
n := m/M = 7.70833 mol/s
W := c_pH2O*n*ΔT = 40625.8 W
# Brechnung der Rynoldsche Zahl:
r := 45 mm
μ_283k := 1.3077*10^-3 Pa*s
μ_323k := 54.94*10^-5 Pa*s
μ_353k := 35.65*10^-5 Pa*s
A := π*r^2 = 0.00636173 m^2
u := V/A = 0.021832 m/s
Re_283k := r*ρ*u/μ_283k = 750.52
# Grenzwert ca. 2000, fast immer laminare Strömung
Re_323k := r*ρ*u/μ_323k = 1786.41
Re_353k := r*ρ*u/μ_353k = 2753.03
